*Heading
** Job name: B737 Model name: Model-1
** Generated by: Abaqus/CAE 2017
*Preprint, echo=NO, model=NO, history=NO, contact=NO
**
** PARTS
**
*Part, name=B737
*Node
      1,        2661.,           0.,        102.5
      2,        2591.,           0.,        102.5
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*Element, type=S4R
 1,    1,   43, 1034,   56
 2,   43,   44, 1035, 1034
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*Nset, nset=Skin
    1,    2,    3,    4,    5,    6
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*Elset, elset=Skin
    1,    2,    3,    4,    5,    6
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*Nset, nset=Spar
    3,    4,    6,    8,   10,   13
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*Elset, elset=Spar
 1732, 1733, 1734, 1735, 1736, 1737
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*Nset, nset=Rib_A
  12,  13,  15,  36,  37,  38
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*Nset, nset=Rib_B
   9,  10,  32,  33,  34,  35
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*Nset, nset=Rib_C
   5,   6,  21,  22,  25,  28
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*Nset, nset=Rib_D
   2,   3,  16,  17,  20,  23
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*Nset, nset=Point_5
   11,   14,   39,   40,   41,   42
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*Nset, nset=Point_15
   1,   4,  18,  19,  24,  26
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*Nset, nset=Point_10
   7,   8,  27,  29,  30,  31
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** Section: Skin
*Shell Section, elset=Skin, material=Aluminium
1.55, 5
** Section: Spar
*Shell Section, elset=Spar, material=Aluminium
2.8, 5
*End Part
**
**
** ASSEMBLY
**
*Assembly, name=Assembly
**
*Instance, name=B737-1, part=B737
*End Instance
**
*Node
      1,         172.,           0.,           0.
*Node
      2,        1036.,        102.5,        102.5
*Node
      3,        2591.,           0.,           0.
*Node
      4,        1386.,        102.5,        102.5
*Node
      5,           0.,           0.,       -48.75
*Node
      6,   266.100006,           0.,       -48.75
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*Nset, nset=Hinge_2, instance=B737-1
   7,   8,  27,  29,  30,  31
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*Nset, nset=Point_6, instance=B737-1
  242,  254,  784,  819,  872, 1024
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*Nset, nset=Point_7, instance=B737-1
  231,  265,  773,  808,  861, 1013
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*Nset, nset=Point_8, instance=B737-1
  221,  275,  763,  798,  851, 1003
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*Nset, nset=Point_9, instance=B737-1
  178,  184,  696,  715,  737,  942
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*Nset, nset=Point_10, instance=B737-1
  157,  171,  548,  560,  603,  747
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*Nset, nset=Point_11, instance=B737-1
   96,  116,  382,  415,  492,  633
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*Nset, nset=Point_12, instance=B737-1
   85,  127,  371,  426,  503,  644
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*Nset, nset=Point_13, instance=B737-1
   74,  138,  360,  437,  514,  655
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*Nset, nset=Point_14, instance=B737-1
   64,  148,  350,  447,  524,  665
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*Nset, nset=Point_15, instance=B737-1
   1,   4,  18,  19,  24,  26
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*Nset, nset=Set-26
 1,
*Nset, nset=Set-27
 2,
*Nset, nset=Set-28
 3,
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*Nset, nset=Set-78
 16,
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*Nset, nset=Set-84
 2,
*Nset, nset=Set-85
 4,
*Nset, nset=Set-86
 5,
*Nset, nset=Set-87
 6,
*Nset, nset=Set-88
 7,
*Nset, nset=Set-89
 8,
*Nset, nset=Set-90
 9,
*Nset, nset=Set-91
 10,
*Nset, nset=Set-92
 11,
*Nset, nset=Set-93
 12,
*Nset, nset=Set-94
 13,
*Nset, nset=Set-95
 14,
*Nset, nset=Set-96
 15,
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*Nset, nset=m_Set-45
 1,
*Nset, nset=m_Set-46
 2,
*Nset, nset=m_Set-47
 4,
*Nset, nset=m_Set-48
 3,
*Nset, nset=m_Set-49
 5,
*Nset, nset=m_Set-50
 6,
*Nset, nset=m_Set-51
 7,
*Nset, nset=m_Set-52
 8,
*Nset, nset=m_Set-53
 9,
*Nset, nset=m_Set-54
 10,
*Nset, nset=m_Set-55
 11,
*Nset, nset=m_Set-56
 12,
*Nset, nset=m_Set-57
 13,
*Nset, nset=m_Set-58
 14,
*Nset, nset=m_Set-59
 15,
*Nset, nset=m_Set-63
 5,
*Nset, nset=m_Set-77
 16,
*Surface, type=NODE, name=B737-1_Rib_A_CNS_, internal
B737-1.Rib_A, 1.
*Surface, type=NODE, name=B737-1_Rib_B_CNS_, internal
B737-1.Rib_B, 1.
*Surface, type=NODE, name=B737-1_Rib_C_CNS_, internal
B737-1.Rib_C, 1.
*Surface, type=NODE, name=B737-1_Rib_D_CNS_, internal
B737-1.Rib_D, 1.
*Surface, type=NODE, name=B737-1_Point_5_CNS_, internal
B737-1.Point_5, 1.
*Surface, type=NODE, name=Point_6_CNS_, internal
Point_6, 1.
*Surface, type=NODE, name=Point_7_CNS_, internal
Point_7, 1.
*Surface, type=NODE, name=Point_8_CNS_, internal
Point_8, 1.
*Surface, type=NODE, name=Point_9_CNS_, internal
Point_9, 1.
*Surface, type=NODE, name=Point_10_CNS_, internal
Point_10, 1.
*Surface, type=NODE, name=Point_11_CNS_, internal
Point_11, 1.
*Surface, type=NODE, name=Point_12_CNS_, internal
Point_12, 1.
*Surface, type=NODE, name=Point_13_CNS_, internal
Point_13, 1.
*Surface, type=NODE, name=Point_14_CNS_, internal
Point_14, 1.
*Surface, type=NODE, name=Point_15_CNS_, internal
Point_15, 1.
*Surface, type=NODE, name=Hinge_2_CNS_, internal
Hinge_2, 1.
*Nset, nset=_T-B737-1-Rotated, internal
Set-84,
Set-26,
Set-78,
Set-28,
Set-85,
B737-1.Rib_A,
m_Set-45,
B737-1.Rib_B,
m_Set-46,
B737-1.Rib_C,
m_Set-47,
B737-1.Rib_D,
m_Set-48,
Hinge_2,
m_Set-77,
*Transform, nset=_T-B737-1-Rotated
          1.,           0.,           0.,           0., 0.882925313831627, -0.469513461143899
** Constraint: Constraint-1
*MPC
BEAM, B737-1.Rib_A, m_Set-45
** Constraint: Constraint-2
*MPC
BEAM, B737-1.Rib_B, m_Set-46
** Constraint: Constraint-3
*MPC
BEAM, B737-1.Rib_C, m_Set-47
** Constraint: Constraint-4
*MPC
BEAM, B737-1.Rib_D, m_Set-48
** Constraint: Constraint-5
*MPC
BEAM, B737-1.Point_5, m_Set-63
** Constraint: Constraint-6
*MPC
BEAM, Point_6, m_Set-50
** Constraint: Constraint-7
*MPC
BEAM, Point_7, m_Set-51
** Constraint: Constraint-8
*MPC
BEAM, Point_8, m_Set-52
** Constraint: Constraint-9
*MPC
BEAM, Point_9, m_Set-53
** Constraint: Constraint-10
*MPC
BEAM, Point_10, m_Set-54
** Constraint: Constraint-11
*MPC
BEAM, Point_11, m_Set-55
** Constraint: Constraint-12
*MPC
BEAM, Point_12, m_Set-56
** Constraint: Constraint-13
*MPC
BEAM, Point_13, m_Set-57
** Constraint: Constraint-14
*MPC
BEAM, Point_14, m_Set-58
** Constraint: Constraint-15
*MPC
BEAM, Point_15, m_Set-59
** Constraint: Constraint-16
*MPC
BEAM, Hinge_2, m_Set-77
*End Assembly
**
** MATERIALS
**
*Material, name=Aluminium
*Elastic
 73.1, 0.33
**
** BOUNDARY CONDITIONS
**
** Name: Hinge_1 Type: Displacement/Rotation
*Boundary
Set-26, 2, 2
Set-26, 3, 3
** Name: Hinge_2 Type: Displacement/Rotation
*Boundary
Set-78, 1, 1
Set-78, 2, 2
Set-78, 3, 3
** Name: Hinge_3 Type: Displacement/Rotation
*Boundary
Set-28, 2, 2
Set-28, 3, 3
** ----------------------------------------------------------------
**
** STEP: Bending
**
*Step, name=Bending, nlgeom=NO
*Static
1., 1., 1e-05, 1.
**
** BOUNDARY CONDITIONS
**
** Name: Actuator_1 Type: Displacement/Rotation
*Boundary
Set-84, 3, 3
** Name: Hinge_1 Type: Displacement/Rotation
*Boundary
Set-26, 2, 2, 11.54
** Name: Hinge_3 Type: Displacement/Rotation
*Boundary
Set-28, 2, 2, 18.4
**
** OUTPUT REQUESTS
**
*Restart, write, frequency=0
**
** FIELD OUTPUT: F-Output-1
**
*Output, field, variable=PRESELECT
**
** HISTORY OUTPUT: H-Output-1
**
*Output, history, variable=PRESELECT
*End Step
** ----------------------------------------------------------------
**
** STEP: Jam_Bent
**
*Step, name=Jam_Bent, nlgeom=NO
*Static
1., 1., 1e-05, 1.
**
** LOADS
**
** Name: Actuator _2   Type: Concentrated force
*Cload
Set-85, 3, -97.4
** Name: Aero_1   Type: Concentrated force
*Cload
Set-86, 2, -0.737
** Name: Aero_2   Type: Concentrated force
*Cload
Set-87, 2, -1.474
** Name: Aero_3   Type: Concentrated force
*Cload
Set-88, 2, -1.474
** Name: Aero_4   Type: Concentrated force
*Cload
Set-89, 2, -1.474
** Name: Aero_5   Type: Concentrated force
*Cload
Set-90, 2, -1.474
** Name: Aero_6   Type: Concentrated force
*Cload
Set-91, 2, -1.474
** Name: Aero_7   Type: Concentrated force
*Cload
Set-92, 2, -1.474
** Name: Aero_8   Type: Concentrated force
*Cload
Set-93, 2, -1.474
** Name: Aero_9   Type: Concentrated force
*Cload
Set-94, 2, -1.474
** Name: Aero_10   Type: Concentrated force
*Cload
Set-95, 2, -1.474
** Name: Aero_11   Type: Concentrated force
*Cload
Set-96, 2, -0.737
**
** OUTPUT REQUESTS
**
*Restart, write, frequency=0
**
** FIELD OUTPUT: F-Output-1
**
*Output, field, variable=PRESELECT
**
** HISTORY OUTPUT: H-Output-1
**
*Output, history, variable=PRESELECT
*End Step
** ----------------------------------------------------------------
**
** STEP: Jam_Straight
**
*Step, name=Jam_Straight, nlgeom=NO
*Static
1., 1., 1e-05, 1.
**
** BOUNDARY CONDITIONS
**
** Name: Hinge_1 Type: Displacement/Rotation
*Boundary
Set-26, 2, 2
** Name: Hinge_3 Type: Displacement/Rotation
*Boundary
Set-28, 2, 2
**
** OUTPUT REQUESTS
**
*Restart, write, frequency=0
**
** FIELD OUTPUT: F-Output-1
**
*Output, field, variable=PRESELECT
**
** HISTORY OUTPUT: H-Output-1
**
*Output, history, variable=PRESELECT
*End Step
